#This is the file to calculate the <111> GSFE curve. Along this curve, there are 101 data points. orient [11-2] [111] [1-10], x, y, z

#shell   mkdir      dump

#variable	n loop 20
#label		loopn

# ------------------- INITIALIZE -------------------------------
units           metal
dimension	3
boundary        p p s
atom_style      atomic

# ------------------- ATOM DEFINE ------------------------------

variable        xl equal 0
variable        xh equal 2
variable        yl equal 0
variable        yh equal 2
variable        zl equal 0
variable        zh equal 8

#lattice         bcc ${latparam} orient x 1 1 -2 orient y 1 1 1 orient z 1 -1 0
region          mybox block ${xl} ${xh} ${yl} ${yh} ${zl} ${zh}

create_box      5 mybox

read_data	data.MoNbTa

mass 1 180.948 # Ta
mass 2 92.9064 # Nb
mass 3 50.9415 # V
mass 4 95.94 # Mo
mass 5 183.84 # W

variable	sca equal 0.99
change_box	all x scale ${sca} y scale ${sca} z scale ${sca} remap
variable        latparam equal 3.3

# ------------------- FIELD DEFINE -----------------------------
pair_style        mlip mlip.ini
pair_coeff        * *

neighbor        0.3     bin
neigh_modify    delay   10

# ------------------- SETTINGS ---------------------------------
thermo          1000
thermo_style    custom step etotal

variable        fixz equal ${latparam}/sqrt(2.)*1.5

variable        tmp0 equal "zlo"      ##### 8>5.8799999999999999 (potential cutoff), variable
variable        zlo0 equal ${tmp0}+${fixz}
variable        tmp1 equal "zhi"
variable        zhi0 equal ${tmp1}-${fixz}
variable        tmp2 equal "(zlo+zhi)/2"
variable        zmid equal ${tmp2}

region		upbound block INF INF INF INF ${zhi0} INF units box
region		lobound block INF INF INF INF INF ${zlo0} units box

group		upbound region upbound
group		lobound region lobound
group		boundary union lobound upbound
group		mobile subtract all boundary

variable        d equal 1
variable        mid equal ${zmid}+${latparam}/sqrt(2.)*(${d}-10)

region		upper block INF INF INF INF ${mid} INF units box      #variable
region		lower block INF INF INF INF INF ${mid} units box      #variable

group		top region upper
group		bot region lower

variable        Nslip equal 1                   #the number of periods
variable        stepn equal 100
variable        stepm equal ${Nslip}*${stepn}+1

variable        area equal lx*ly

variable        disp equal (${latparam}*sqrt(3)/2)/${stepn}

displace_atoms  bot move 0 ${disp} 0 units box

variable        a loop ${stepm}
label           loopa

variable        rdisp equal ($a-1)/${stepn}

displace_atoms  bot move 0 -${disp} 0 units box

compute         peratom all pe/atom
compute         eatoms all reduce sum c_peratom

variable        gsfe equal c_eatoms/${area}*1.60218*10000

dump            1 all custom 10000 dump.* id type xs ys zs

thermo          1
thermo_style    custom step pe c_eatoms

fix		1 boundary setforce 0.0 0.0 0.0
fix		2 mobile setforce 0.0 0.0 NULL

min_style       cg
minimize	1e-12 1e-12 10000 10000           #minimize        0.0 0.0 100000 100000

print           "${rdisp} ${gsfe}" append gsfe_ori

undump          1
unfix           1
unfix		2
uncompute       peratom
uncompute       eatoms

next            a
jump            lmp_gsfe.in loopa

#clear
#next		n
#jump		lmp_HEA.in loopn
